# AguaClara Design Tool
# [reference: BasicClientInputs.xmcd]
Ti_wanted := 5 min
# [reference: ExpertInputs.xmcd]
# [reference: DesignAssumptions.xmcd]
# [reference: MathFunctions.xmcd]
# [reference: PipeDatabase.xmcd]
# [reference: MinorLossCoefficients.xmcd]
# [reference: FluidsFunctions.xmcd]
# [reference: Sedimentation Tank.xmcd]
# [reference: Floc Hopper - New Design.xmcd]
# [reference: FCM.xmcd]
# [reference: Flocculator 3.xmcd]
# [reference: RapidMixer.xmcd]
# [reference: EntranceTankDim.xmcd]
HW_FlocEnd = 1.72793 m
# [reference: Materials List.xmcd]
# [reference: AutoCADMasterProgram.xmcd]
EN_FlocHoriz = 0
# This file must have at least one variable displayed otherwise it doesn't recalculate and it claims that all variables are undefined.
Q_Plant = 0.006 m^3/s
H_SedFrameWall =  # error: This variable is undefined.
EN_DrillSeries = 0
EN_PipeSpec = 8
L_Sed = 3.70286 m
EN_FcmTube = 0
AC_SedTank = [
    "_-view o t"; "-layer m tank"; "c t 132,132,132"; "tank"; "  "; "_-view o t _zoom w 0.16,-0.16,0 -3.86286,1.16,1.82793 _box 0,0,0 -3.70286,1,1.82793 _box 0.15,-0.15,-0.15 -3.85286,1.15,1.82793 _subtract 0.15,-0.15,-0.15  0,0,0 "; "-layer s 0"; "  "; "-layer f tank"; "  "
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]
AC_FlocTank = [
    "-layer m floctank";
    "c t 91,91,91";
    "floctank";
    "  ";
    "_-view o t _zoom w 0.16,2.14,0 -3.86286,4.11,1.96265 _box 0,2.3,0 -3.70286,3.95,1.96265 _box 0.15,2.15,-0.15 -3.85286,4.1,1.96265 _subtract 0.15,2.15,-0.15  0,2.3,0 ";
    "_box -3.85286,2.75,0 0.15,2.9,1.96265";
    "_box -0.09032,2.75,0.6493 0,2.9,0";
    "_subtract -3.85286,2.75,0  -0.09032,2.75,0.6493 ";
    "_box -3.85286,3.35,0 0.15,3.5,1.96265";
    "_box -3.70286,3.35,0.6493 -3.61254,3.5,0"
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]
# [component: inputs AC_FlocTank]
