# AguaClara Water Treatment Plants
# Design References
# MathCAD dimension calculations:
# Variable Naming Guide
# The list below is the list names that can be used before the period for the subscript in our variable names.
# Major Plant Components. These items follow the period in the variable name
# [reference: BasicInputs.xmcd]
# [reference: ExpertInputs.xmcd]
# [reference: MathFunctions.xmcd]
# [reference: PipeDatabase.xmcd]
# [reference: FluidsFunctions.xmcd]
# [reference: SedimentationTank.xmcd]
[
    "Subscripts", "";
    "component key", "Description";
    "Et", "Entrance tank";
    "Lfom", "Linear flow orifice meter";
    "Rm", "Rapid mix";
    "Floc", "Flocculation tank";
    "Sed", "Sedimentation tank";
    "Fi", "Stacked Rapid Sand Filter"
]
# [reference: Flocculator.xmcd]
# [reference: LFOM.xmcd]
# [reference: LinearCdc.xmcd]
# [reference: ChemStorageTanks.xmcd]
# [reference: EntranceTank.xmcd]
# [reference: DrainChannel.xmcd]
# [reference: StackedRapidSandFilter.xmcd]
# [reference: MaterialsList.xmcd]
# AutoCAD drawing programs:
# Translators:
# These are the codes that take MathCAD outputs and create AutoCAD scripts that are used to draw the plant (formerly Basics)
# [reference: MtoATranslators.xmcd]
# The wrapped MtoA translator contains the functions that the user will want to access. These functions will draw pieces with full functionality - specifying the location, dimension, and orientation of the object. Also, it contains layer control and subtraction capabilities for grouped objects.
# [reference: MtoATranslatorsWrapped.xmcd]
[
    "Symbol", "Description", "Dimensions";
    "Amp", "amplitude", "L";
    "B", "perpendicular distance between components (center to center)", "L";
    "D", "Diameter", "L";
    "E", "pipe roughness", "L";
    "FB", "Freeboard", "L";
    "H", "height (includes freeboard)", "L";
    "HL", "head loss", "L";
    "HW", "local water depth", "L";
    "ID", "inner diameter", "L";
    "L", "length", "L";
    "Loc", "Locations", "L";
    "ND", "nominal diameter", "L";
    "OD", "outer diameter", "L";
    "R", "Radius", "L";
    "S", "space between components", "L";
    "T", "thickness", "L";
    "W", "width", "L";
    "Z", "elevation relative to bottom of sed tank", "L";
    "ZW", "water depth relative to bottom of sed tank", "L";
    "V", "velocity", "L/T";
    "CP", "Collision Potential", "L^(2/3)";
    "A", "Area", "L^2";
    "Nu", "kinematic viscosity", "L^2/T";
    "ED", "energy dissipation rate", "L^2/T^3";
    "Vol", "volume", "L^3";
    "Q", "flow", "L^3/T";
    "MW", "Molecular weight", "M";
    "C", "Concentration", "M/L^3";
    "Rho", "Density", "M/L^3";
    "AN", "angle", "radians";
    "Ti", "time", "T";
    "EN", "Enumerated type", "dimensionless";
    "N", "Number", "dimensionless";
    "Pi", "dimensionless geometric ratio", "";
    "AC", "AutoCAD command string", "";
    "K", "minor loss coefficient", ""
]
# Plant Elements:
# These are all of the files that draw the fundamental parts of the plants (tees, elbows, tanks, pipes, etc)
# [reference: ChannelF.xmcd]
# [reference: PlumbingF.xmcd]
# [reference: TankF.xmcd]
# [reference: StairsF.xmcd]
# [reference: DrainChannelF.xmcd]
# Specific Pieces:
# These are the codes that draw the bigger pieces of the plant (the sed tank, floc tank, etc)
# [reference: FlocculatorAC.xmcd]
# [reference: SedimentationTankAC.xmcd]
# [reference: EntranceTankAC.xmcd]
# [reference: ChemStockTanksAC.xmcd]
# [reference: StackedRapidSandFilterAC.xmcd]
# [reference: OperatorAccessAC.xmcd]
# [reference: DrainChannelAC.xmcd]
# Layouts:
# This rearranges the plant to optimize the layout
# [reference: PlantLayoutsAC.xmcd]
# This file will execute at the very end to create multiple views of the entire plant in paperspace
# [reference: LayoutsAC.xmcd]
# Sedimentation
# Sed Tanks and Slopes:
N_SedTanks = 3
L_Sed = 3.56078 m
N_SedBays = 2  # Number of bays of inlet manifolds in each sed tank
# Length of the port through which water exits the inlet manifold
# Width of ferrous cement plates in whice one manifold port is cut
Q_SedBay = 3 L/s
# Sedimentation Tank Sludge Drain:
N_SedSludgeOrifices = 24  # per cell
Ti_SludgeDrain = 30 min  # Tank Drain time
W_SedSludge = 6.71293 cm  # Width of the sludge channel
B_SedSludgeOrifices = 10.693 cm  # Distance center to center between drain orifices
# Depth of the sludge channel
H_SedSludge = 6.71293 cm
W_SedDrainCover = 11.43 cm
D_SedSludgeOrifice = 0.00980191 m  # Diameter of drain orifices
N_SedSludgeOrifices = 24
# Sedimentation Tank Dimensions:
Z_SedSludge = 0.0671293 m  # Height from 0 of the top of the sludge drain
# Height from 0 of the top of the inlet manifold
W_Sed = 2 m
L_Sed = 3.56078 m  # Total tank length
# Inlet Channel:
HW_SedInletChannel = 0.303588 m  # Width of the drop chimneys connecting channel to sed inlet manifolds
W_SedInletChannel = 0.44415 m  # length of drop chimmneys
L_SedChannel = 6.3 m
H_SedInletChannel = 0.403588 m
# Sedimentation Tank Effluent Launder:
N_SedLaunderOrifices = 46  # Number of orifices per launder  # More Launder Dimensions
ND_SedLaunder = 4 in
Q_SedLaunderOrifices = 6.52174e-5 m^3/s
# Center to center launder spacing
L_SedLaunder = 2.50781 m
B_SedLaunderOrifices = 0.1 m
D_SedLaunderOrifice = 0.472441 in
# Exit Channel:
W_SedExitChannel = 0.250875 m
H_SedExitChannel = 0.403588 m
HW_SedExitChannel = 0.263588 m  # water height in exit channel from 0
# Lamella:
L_SedPlate = 0.75 m  # center to center distance between lamella
B_SedPlate = 2.7 cm  # spacing between lamella
S_SedPlate = 2.5 cm
N_SedPlates = 81  # Number of Sed Plates per Sedimentation Tank Bay.
AN_SedPlate = 60 deg
V_SedC = 10.3649 m/day
L_SedActive = 2.52302 m
V_SedUp = 86.4 m/day
Z_SedLaunder = 1.88021 m
N_SedPlates = 81
HW_Sed = 1.98007 m
H_Sed = 2.09086 m
# Flocculator
# Look at Flocculator Positioning arrays
W_FlocChannel = 0.6 m
# Fill last channel with bafffles from last channel
ED_Floc = 10 mW/kg
# Fix port width to be based on energy dissipation in that channel
# Adjust spacing after the number of baffles per channel is known.
HW_FlocEnd = 1.98007 m
# Check the residence time of the flocculator should be at least 20minutes
X_FlocBaffles = [
    0.21371, 0.21371, 0.21371, 0.21371, 0.21371, 0.21371;
    0.40942, 0.40942, 0.40942, 0.40942, 0.40942, 0.40942;
    0.60513, 0.60513, 0.60513, 0.60513, 0.60513, 0.60513;
    0.80084, 0.80084, 0.80084, 0.80084, 0.80084, 0.80084;
    0.996549, 0.996549, 0.996549, 0.996549, 0.996549, 0.996549;
    1.19226, 1.19226, 1.19226, 1.19226, 1.19226, 1.19226;
    1.38797, 1.38797, 1.38797, 1.38797, 1.38797, 1.38797;
    1.58368, 1.58368, 1.58368, 1.58368, 1.58368, 1.58368;
    1.77939, 1.77939, 1.77939, 1.77939, 1.77939, 1.77939;
    1.9751, 1.9751, 1.9751, 1.9751, 1.9751, 1.9751;
    2.17081, 2.17081, 2.17081, 2.17081, 2.17081, 2.17081;
    2.36652, 2.36652, 2.36652, 2.36652, 2.36652, 2.36652;
    2.56223, 2.56223, 2.56223, 2.56223, 2.56223, 2.56223;
    2.75794, 2.75794, 2.75794, 2.75794, 2.75794, 2.75794;
    2.95365, 2.95365, 2.95365, 2.95365, 2.95365, 2.95365;
    3.14936, 3.14936, 3.14936, 3.14936, 3.14936, 3.14936;
    3.34507, 3.34507, 3.34507, 3.34507, 3.34507, 0
] m
L_FlocBaffles = [
    1.68951, 1.68951, 1.68951, 1.68951, 1.68951, 2.00121;
    2.00121, 2.00121, 2.00121, 2.00121, 2.00121, 1.68951;
    1.68951, 1.68951, 1.68951, 1.68951, 1.68951, 2.00121;
    2.00121, 2.00121, 2.00121, 2.00121, 2.00121, 1.68951;
    1.68951, 1.68951, 1.68951, 1.68951, 1.68951, 2.00121;
    2.00121, 2.00121, 2.00121, 2.00121, 2.00121, 1.68951;
    1.68951, 1.68951, 1.68951, 1.68951, 1.68951, 2.00121;
    2.00121, 2.00121, 2.00121, 2.00121, 2.00121, 1.68951;
    1.68951, 1.68951, 1.68951, 1.68951, 1.68951, 2.00121;
    2.00121, 2.00121, 2.00121, 2.00121, 2.00121, 1.68951;
    1.68951, 1.68951, 1.68951, 1.68951, 1.68951, 2.00121;
    2.00121, 2.00121, 2.00121, 2.00121, 2.00121, 1.68951;
    1.68951, 1.68951, 1.68951, 1.68951, 1.68951, 2.00121;
    2.00121, 2.00121, 2.00121, 2.00121, 2.00121, 1.68951;
    1.68951, 1.68951, 1.68951, 1.68951, 1.68951, 2.00121;
    2.00121, 2.00121, 2.00121, 2.00121, 2.00121, 1.68951;
    1.68951, 1.68951, 1.68951, 1.68951, 1.68951, 0
] m
Z_FlocBaffles = [
    0, 0, 0, 0, 0, 0.290565;
    0.290565, 0.290565, 0.290565, 0.290565, 0.290565, 0;
    0, 0, 0, 0, 0, 0.290565;
    0.290565, 0.290565, 0.290565, 0.290565, 0.290565, 0;
    0, 0, 0, 0, 0, 0.290565;
    0.290565, 0.290565, 0.290565, 0.290565, 0.290565, 0;
    0, 0, 0, 0, 0, 0.290565;
    0.290565, 0.290565, 0.290565, 0.290565, 0.290565, 0;
    0, 0, 0, 0, 0, 0.290565;
    0.290565, 0.290565, 0.290565, 0.290565, 0.290565, 0;
    0, 0, 0, 0, 0, 0.290565;
    0.290565, 0.290565, 0.290565, 0.290565, 0.290565, 0;
    0, 0, 0, 0, 0, 0.290565;
    0.290565, 0.290565, 0.290565, 0.290565, 0.290565, 0;
    0, 0, 0, 0, 0, 0.290565;
    0.290565, 0.290565, 0.290565, 0.290565, 0.290565, 0;
    0, 0, 0, 0, 0, 0
] m
N_FlocChannels = 6
L_FlocTank = 21.3647 m
HL_Floc = 26.1699 cm
HW_FlocStart = 2.24177 m
S_FlocBaffle = [19.371; 19.371; 19.371; 19.371; 19.371; 19.371] cm
B_FlocBaffle = [19.571; 19.571; 19.571; 19.571; 19.571; 19.571] cm
N_FlocChannelBaffles = [17; 17; 17; 17; 17; 16]
W_FlocPort = [0.19371; 0.19371; 0.19371; 0.19371; 0.19371; 0.19371] m
HL_FlocChannels = [4.40241; 4.40241; 4.40241; 4.40241; 4.40241; 4.15783] cm
L_FlocBaffleLower = 1.68951 m
L_FlocBaffleUpper = 2.00121 m
H_FlocPort = [0.6; 0.6; 0.6; 0.6; 0.6; 0.6] m
Ti_Floc = 23.502 min  # residence time of the flocculator
N_FlocBaffles = 101
# Materials List
N_Valves = 6
N_ValveCouplings = 6
N_SedPlatesTotal = 486
N_SedPlatesPerSheet = 4
N_SedPlateSheets = 122
# AutoCAD Scripts
AC_SedTank =  # no stored result
AC_EntranceTank =  # no stored result
AC_FlocTank =  # no stored result
AC_ChemTanks = [
    "-layer m CoagTanks"; "c t 132,132,132"; "CoagTanks"; "  "; "_-view o t"; "_zoom w -4.97453,12.59,1.73709 -4.33493,13.2296,2.98129"; "_cylinder -4.65473,12.9098,2.97129 0.3098 a -5.87893,12.9098,2.97129"; "rotate3d l  y -4.65473,12.9098,2.97129 90"; "-group c CoagTanks y "; "all "
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]
AC_OperatorAccess = [
    "-layer m OpWalkwayCon"; "c t 132,132,132"; "OpWalkwayCon"; "  "; "_-view o f"; "_pline"; "-6.38413,2.97129"; "-6.08413,2.97129"; "-6.08413,2.77408"; "-5.78413,2.77408"
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]
AC_DrainChannel = [
    "-layer m DC"; "c t 214,214,214"; "DC"; "  "; "3dpoly"; "0.2,12.45,1.22749"; "0.2,12.45,0.84627"; "0.2,13.21243,0.84627"; "0.2,13.21243,1.22749"; "0.2,12.45,1.22749 "
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]
AC_Layout = [
    "laythw"; "-layout t AguaClara 0"; "View"; "layout d Layout1"; " d Layout2"; "layout r View"; "TopView"; "layout s TopView"; ".ms"; "z o all "
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]
AC_Filter =  # no stored result
# [component: inputs stack(AC_EntranceTank, AC_SedTank, AC_FlocTank, AC_DrainChannel)]
